# OpenSim document version 40000
AnalyzeTool subject01:
  model_file: subject01_simbody_adjusted.osim
  replace_force_set: false
  force_set_files: gait2392_SO_Residual_Actuators.xml
  results_directory: /Users/gattia/jupyterNotebooks/opensim_memory_leak_example/Results
  output_precision: 6
  initial_time: 0.5
  final_time: 2
  solve_for_equilibrium_for_auxiliary_states: false
  maximum_number_of_integrator_steps: 20000
  maximum_integrator_step_size: 1
  minimum_integrator_step_size: 1e-8
  integrator_error_tolerance: 1e-5
  external_loads_file: /Users/gattia/jupyterNotebooks/opensim_memory_leak_example/Gait2392_Simbody/subject01_walk1_grf.xml
  coordinates_file: /Users/gattia/jupyterNotebooks/opensim_memory_leak_example/Results/ik_results.mot
  lowpass_cutoff_frequency_for_coordinates: 6
  AnalysisSet Analyses:
    StaticOptimization: start_time=0.5 end_time=2 step_interval=10 in_degrees=true use_model_force_set=true
        activation_exponent=2 use_muscle_physiology=true
