# OpenSim document version 40000
Model 3DGaitModel2392:
  gravity: 0 -9.80665 0
  length_units: meters
  force_units: N
  credits:
    Delp S.L., Loan J.P., Hoy M.G., Zajac F.E., Topp E.L., Rosen J.M., Thelen D.G., Anderson F.C., Seth A. Notes: 3D, 23 DOF gait model created by D.G. Thelen, Univ. of Wisconsin-Madison, and Ajay Seth, Frank C. Anderson, and Scott L. Delp, Stanford University. Lower extremity joint defintions based on Delp et al. (1990). Low back joint and anthropometry based on Anderson and Pandy (1999, 2001). Planar knee model of Yamaguchi and Zajac (1989). Seth replaced tibia translation constraints with a CustomJoint for the knee and removed the patella to eliminate all kinematic constraints; insertions of the quadrucepts are handled with moving points in the tibia frame as defined by Delp 1990. License: Creative Commons (CCBY 3.0). You are free to distribute, remix, tweak, and build upon this work, even commercially, as long as you credit us for the original creation. http://creativecommons.org/licenses/by/3.0/ More Information: http://simtk-confluence.stanford.edu:8080/display/OpenSim/Gait+2392+and+2354+Models
  publications:
    Delp, S.L., Loan, J.P., Hoy, M.G., Zajac, F.E., Topp E.L., Rosen, J.M.: An interactive graphics-based model of the lower extremity to study orthopaedic surgical procedures, IEEE Transactions on Biomedical Engineering, vol. 37, pp. 757-767, 1990. Yamaguchi G.T., Zajac F.E.: A planar model of the knee joint to characterize the knee extensor mechanism." J . Biomecl7. vol. 21. pp. 1-10. 1989. Anderson F.C., Pandy M.G.: A dynamic optimization solution for vertical jumping in three dimensions. Computer Methods in Biomechanics and Biomedical Engineering 2:201-231, 1999. Anderson F.C., Pandy M.G.: Dynamic optimization of human walking. Journal of Biomechanical Engineering 123:381-390, 2001.
  Ground: meshes=treadmill.vtp
  BodySet:
    Body pelvis: mass=11.28116 [kg] mass_center=(-0.0724376 0 0) inertia=(0.1033717 0.08758436 0.05822198 0 0 0)
        meshes=(sacrum.vtp pelvis.vtp l_pelvis.vtp)
    Body femur_r: mass=8.90979 mass_center=(0 -0.1950308 0) inertia=(0.1688139 0.0442522 0.1780174 0 0 0)
        meshes=femur_r.vtp
    Body tibia_r: mass=3.551406 mass_center=(0 -0.1845572 0) inertia=(0.04717623 0.004773785 0.04783146 0 0 0)
        meshes=(tibia_r.vtp fibula.vtp)
    Body talus_r: mass=0.09578977 mass_center=(0 0 0) inertia=(0.0011887 0.0011887 0.0011887 0 0 0) meshes=talus.vtp
    Body calcn_r: mass=1.197372 mass_center=(0.1027085 0.03081254 0)
        inertia=(0.001414685 0.003940908 0.004143006 0 0 0) meshes=foot.vtp
    Body toes_r: mass=0.2074806 mass_center=(0.03553713 0.006162509 -0.01797398)
        inertia=(0.0001010489 0.0002020979 0.0001010489 0 0 0) meshes=bofoot.vtp
    Body femur_l: mass=8.90979 mass_center=(0 -0.1950308 0) inertia=(0.1688139 0.0442522 0.1780174 0 0 0)
        meshes=femur_l.vtp
    Body tibia_l: mass=3.551406 mass_center=(0 -0.1845572 0) inertia=(0.04717623 0.004773785 0.04783146 0 0 0)
        meshes=(tibia_l.vtp l_fibula.vtp)
    Body talus_l: mass=0.09578977 mass_center=(0 0 0) inertia=(0.0011887 0.0011887 0.0011887 0 0 0) meshes=l_talus.vtp
    Body calcn_l: mass=1.197372 mass_center=(0.1027085 0.03081254 0)
        inertia=(0.001414685 0.003940908 0.004143006 0 0 0) meshes=l_foot.vtp
    Body toes_l: mass=0.2074806 mass_center=(0.03553713 0.006162509 0.01797398)
        inertia=(0.0001010489 0.0002020979 0.0001010489 0 0 0) meshes=l_bofoot.vtp
    Body torso: mass=32.79516 mass_center=(-0.0323916 0.3455104 0) inertia=(1.646592 0.8436762 1.598462 0 0 0)
        meshes=(hat_spine.vtp hat_jaw.vtp hat_skull.vtp hat_ribs.vtp)
  JointSet:
    CustomJoint ground_pelvis: socket_parent_frame=ground_offset socket_child_frame=pelvis_offset
      Coordinate pelvis_tilt: default_value=0 range=(-1.570796 1.570796) clamped=false
      Coordinate pelvis_list: default_value=0 range=(-1.570796 1.570796) clamped=false
      Coordinate pelvis_rotation: default_value=0 range=(-1.570796 1.570796) clamped=false
      Coordinate pelvis_tx: default_value=0 range=(-5 5) clamped=false
      Coordinate pelvis_ty: default_value=0.95 range=(-1 2) clamped=false
      Coordinate pelvis_tz: default_value=0 range=(-3 3) clamped=false
      PhysicalOffsetFrame ground_offset: socket_parent=/ground translation=(0 0 0) [meters]
      PhysicalOffsetFrame pelvis_offset: socket_parent=/bodyset/pelvis translation=(0 0 0)
      SpatialTransform:
        TransformAxis rotation1: coordinates=pelvis_tilt axis=(0 0 1) LinearFunction(coefficients=1 0)
        TransformAxis rotation2: coordinates=pelvis_list axis=(1 0 0) LinearFunction(coefficients=1 0)
        TransformAxis rotation3: coordinates=pelvis_rotation axis=(0 1 0) LinearFunction(coefficients=1 0)
        TransformAxis translation1: coordinates=pelvis_tx axis=(1 0 0) LinearFunction(coefficients=1 0)
        TransformAxis translation2: coordinates=pelvis_ty axis=(0 1 0) LinearFunction(coefficients=1 0)
        TransformAxis translation3: coordinates=pelvis_tz axis=(0 0 1) LinearFunction(coefficients=1 0)
    CustomJoint hip_r: socket_parent_frame=pelvis_offset socket_child_frame=femur_r_offset
      Coordinate hip_flexion_r: default_value=0 range=(-2.094395 2.094395) clamped=false
      Coordinate hip_adduction_r: default_value=0 range=(-2.094395 2.094395) clamped=false
      Coordinate hip_rotation_r: default_value=0 range=(-2.094395 2.094395) clamped=false
      PhysicalOffsetFrame pelvis_offset: socket_parent=/bodyset/pelvis translation=(-0.0724376 -0.06772454 0.08555218)
      PhysicalOffsetFrame femur_r_offset: socket_parent=/bodyset/femur_r translation=(0 0 0)
      SpatialTransform: axes_held_at_zero=(translation1 translation2 translation3)
        TransformAxis rotation1: coordinates=hip_flexion_r axis=(0 0 1) LinearFunction(coefficients=1 0)
        TransformAxis rotation2: coordinates=hip_adduction_r axis=(1 0 0) LinearFunction(coefficients=1 0)
        TransformAxis rotation3: coordinates=hip_rotation_r axis=(0 1 0) LinearFunction(coefficients=1 0)
    CustomJoint knee_r: socket_parent_frame=femur_r_offset socket_child_frame=tibia_r_offset
      Coordinate knee_angle_r: default_value=0 range=(-2.094395 0.1745329) clamped=false
      PhysicalOffsetFrame femur_r_offset: socket_parent=/bodyset/femur_r translation=(0 0 0)
      PhysicalOffsetFrame tibia_r_offset: socket_parent=/bodyset/tibia_r translation=(0 0 0)
      SpatialTransform: axes_held_at_zero=(rotation2 rotation3 translation3)
        TransformAxis rotation1: coordinates=knee_angle_r axis=(0 0 1) LinearFunction(coefficients=1 0)
        TransformAxis translation1: coordinates=knee_angle_r axis=(1 0 0)
          MultiplierFunction: scale=1.14724
            SimmSpline: x=(-2.0944 -1.74533 -1.39626 -1.0472 -0.698132 -0.349066 -0.174533 0.197344 0.337395 0.490178 1.52146 2.0944)
                y=(-0.0032 0.00179 0.00411 0.0041 0.00212 -0.001 -0.0031 -0.005227 -0.005435 -0.005574 -0.005435 -0.00525)
        TransformAxis translation2: coordinates=knee_angle_r axis=(0 1 0)
          MultiplierFunction: scale=1.14724
            SimmSpline: x=(-2.0944 -1.22173 -0.523599 -0.349066 -0.174533 0.159149 2.0944)
                y=(-0.4226 -0.4082 -0.399 -0.3976 -0.3966 -0.395264 -0.396)
    CustomJoint ankle_r: socket_parent_frame=tibia_r_offset socket_child_frame=talus_r_offset
      Coordinate ankle_angle_r: default_value=0 range=(-1.570796 1.570796) clamped=false
      PhysicalOffsetFrame tibia_r_offset: socket_parent=/bodyset/tibia_r translation=(0 -0.4250649 0)
      PhysicalOffsetFrame talus_r_offset: socket_parent=/bodyset/talus_r translation=(0 0 0)
      SpatialTransform: axes_held_at_zero=(rotation2 rotation3 translation1 translation2 translation3)
        TransformAxis rotation1: coordinates=ankle_angle_r axis=(-0.1050135 -0.1740224 0.9791263)
            LinearFunction(coefficients=1 0)
    CustomJoint subtalar_r: socket_parent_frame=talus_r_offset socket_child_frame=calcn_r_offset
      Coordinate subtalar_angle_r: default_value=0 range=(-1.570796 1.570796) clamped=false
      PhysicalOffsetFrame talus_r_offset: socket_parent=/bodyset/talus_r
          translation=(-0.05432871 -0.04673138 0.008822706)
      PhysicalOffsetFrame calcn_r_offset: socket_parent=/bodyset/calcn_r translation=(0 0 0)
      SpatialTransform: axes_held_at_zero=(rotation2 rotation3 translation1 translation2 translation3)
        TransformAxis rotation1: coordinates=subtalar_angle_r axis=(0.7871796 0.6047475 -0.1209495)
            LinearFunction(coefficients=1 0)
    CustomJoint mtp_r: socket_parent_frame=calcn_r_offset socket_child_frame=toes_r_offset
      Coordinate mtp_angle_r: default_value=0 range=(-1.570796 1.570796) clamped=false
      PhysicalOffsetFrame calcn_r_offset: socket_parent=/bodyset/calcn_r
          translation=(0.1836428 -0.00205417 0.001109252)
      PhysicalOffsetFrame toes_r_offset: socket_parent=/bodyset/toes_r translation=(0 0 0)
      SpatialTransform: axes_held_at_zero=(rotation2 rotation3 translation1 translation2 translation3)
        TransformAxis rotation1: coordinates=mtp_angle_r axis=(-0.5809544 0 0.8139361) LinearFunction(coefficients=1 0)
    CustomJoint hip_l: socket_parent_frame=pelvis_offset socket_child_frame=femur_l_offset
      Coordinate hip_flexion_l: default_value=0 range=(-2.094395 2.094395) clamped=false
      Coordinate hip_adduction_l: default_value=0 range=(-2.094395 2.094395) clamped=false
      Coordinate hip_rotation_l: default_value=0 range=(-2.094395 2.094395) clamped=false
      PhysicalOffsetFrame pelvis_offset: socket_parent=/bodyset/pelvis translation=(-0.0724376 -0.06772454 -0.08555218)
      PhysicalOffsetFrame femur_l_offset: socket_parent=/bodyset/femur_l translation=(0 0 0)
      SpatialTransform: axes_held_at_zero=(translation1 translation2 translation3)
        TransformAxis rotation1: coordinates=hip_flexion_l axis=(0 0 1) LinearFunction(coefficients=1 0)
        TransformAxis rotation2: coordinates=hip_adduction_l axis=(-1 0 0) LinearFunction(coefficients=1 0)
        TransformAxis rotation3: coordinates=hip_rotation_l axis=(0 -1 0) LinearFunction(coefficients=1 0)
    CustomJoint knee_l: socket_parent_frame=femur_l_offset socket_child_frame=tibia_l_offset
      Coordinate knee_angle_l: default_value=0 range=(-2.094395 0.1745329) clamped=false
      PhysicalOffsetFrame femur_l_offset: socket_parent=/bodyset/femur_l translation=(0 0 0)
      PhysicalOffsetFrame tibia_l_offset: socket_parent=/bodyset/tibia_l translation=(0 0 0)
      SpatialTransform: axes_held_at_zero=(rotation2 rotation3 translation3)
        TransformAxis rotation1: coordinates=knee_angle_l axis=(0 0 1) LinearFunction(coefficients=1 0)
        TransformAxis translation1: coordinates=knee_angle_l axis=(1 0 0)
          MultiplierFunction: scale=1.14724
            SimmSpline: x=(-2.0944 -1.74533 -1.39626 -1.0472 -0.698132 -0.349066 -0.174533 0.197344 0.337395 0.490178 1.52146 2.0944)
                y=(-0.0032 0.00179 0.00411 0.0041 0.00212 -0.001 -0.0031 -0.005227 -0.005435 -0.005574 -0.005435 -0.00525)
        TransformAxis translation2: coordinates=knee_angle_l axis=(0 1 0)
          MultiplierFunction: scale=1.14724
            SimmSpline: x=(-2.0944 -1.22173 -0.523599 -0.349066 -0.174533 0.159149 2.0944)
                y=(-0.4226 -0.4082 -0.399 -0.3976 -0.3966 -0.395264 -0.396)
    CustomJoint ankle_l: socket_parent_frame=tibia_l_offset socket_child_frame=talus_l_offset
      Coordinate ankle_angle_l: default_value=0 range=(-1.570796 1.570796) clamped=false
      PhysicalOffsetFrame tibia_l_offset: socket_parent=/bodyset/tibia_l translation=(0 -0.4250649 0)
      PhysicalOffsetFrame talus_l_offset: socket_parent=/bodyset/talus_l translation=(0 0 0)
      SpatialTransform: axes_held_at_zero=(rotation2 rotation3 translation1 translation2 translation3)
        TransformAxis rotation1: coordinates=ankle_angle_l axis=(0.1050135 0.1740224 0.9791263)
            LinearFunction(coefficients=1 0)
    CustomJoint subtalar_l: socket_parent_frame=talus_l_offset socket_child_frame=calcn_l_offset
      Coordinate subtalar_angle_l: default_value=0 range=(-1.570796 1.570796) clamped=false
      PhysicalOffsetFrame talus_l_offset: socket_parent=/bodyset/talus_l
          translation=(-0.05432871 -0.04673138 -0.008822706)
      PhysicalOffsetFrame calcn_l_offset: socket_parent=/bodyset/calcn_l translation=(0 0 0)
      SpatialTransform: axes_held_at_zero=(rotation2 rotation3 translation1 translation2 translation3)
        TransformAxis rotation1: coordinates=subtalar_angle_l axis=(-0.7871796 -0.6047475 -0.1209495)
            LinearFunction(coefficients=1 0)
    CustomJoint mtp_l: socket_parent_frame=calcn_l_offset socket_child_frame=toes_l_offset
      Coordinate mtp_angle_l: default_value=0 range=(-1.570796 1.570796) clamped=false
      PhysicalOffsetFrame calcn_l_offset: socket_parent=/bodyset/calcn_l
          translation=(0.1836428 -0.00205417 -0.001109252)
      PhysicalOffsetFrame toes_l_offset: socket_parent=/bodyset/toes_l translation=(0 0 0)
      SpatialTransform: axes_held_at_zero=(rotation2 rotation3 translation1 translation2 translation3)
        TransformAxis rotation1: coordinates=mtp_angle_l axis=(0.5809544 0 0.8139361) LinearFunction(coefficients=1 0)
    CustomJoint back: socket_parent_frame=pelvis_offset socket_child_frame=torso_offset
      Coordinate lumbar_extension: default_value=0 range=(-1.570796 1.570796) clamped=false
      Coordinate lumbar_bending: default_value=0 range=(-1.570796 1.570796) clamped=false
      Coordinate lumbar_rotation: default_value=0 range=(-1.570796 1.570796) clamped=false
      PhysicalOffsetFrame pelvis_offset: socket_parent=/bodyset/pelvis translation=(-0.1031749 0.08350303 0)
      PhysicalOffsetFrame torso_offset: socket_parent=/bodyset/torso translation=(0 0 0)
      SpatialTransform: axes_held_at_zero=(translation1 translation2 translation3)
        TransformAxis rotation1: coordinates=lumbar_extension axis=(0 0 1) LinearFunction(coefficients=1 0)
        TransformAxis rotation2: coordinates=lumbar_bending axis=(1 0 0) LinearFunction(coefficients=1 0)
        TransformAxis rotation3: coordinates=lumbar_rotation axis=(0 1 0) LinearFunction(coefficients=1 0)
  ForceSet:
    Millard2012EquilibriumMuscle [values shared by the 92 below unless stated]: optimal_force=1
        max_contraction_velocity=10 minimum_activation=0.01
      ActiveForceLengthCurve: minimum_value=0
      ForceVelocityCurve: concentric_slope_at_vmax=0 concentric_slope_near_vmax=0.25 isometric_slope=5
          eccentric_slope_at_vmax=0 eccentric_slope_near_vmax=0.15 max_eccentric_velocity_force_multiplier=1.4
      FiberForceLengthCurve
      TendonForceLengthCurve
    Millard2012EquilibriumMuscle glut_med1_r: max_isometric_force=819 optimal_fiber_length=0.05640635
        tendon_slack_length=0.08223729 pennation_angle_at_optimal=0.1396263 [radians]
      PathPoint P1: pelvis (-0.04180274 0.03114714 0.1238714)
      PathPoint P2: femur_r (-0.02500983 -0.01342271 0.06367182)
    Millard2012EquilibriumMuscle glut_med2_r: max_isometric_force=573 optimal_fiber_length=0.08913177
        tendon_slack_length=0.05590513 pennation_angle_at_optimal=0
      PathPoint P1: pelvis (-0.08760134 0.04559368 0.0784826)
      PathPoint P2: femur_r (-0.02959879 -0.006653992 0.06045955)
    Millard2012EquilibriumMuscle glut_med3_r: max_isometric_force=653 optimal_fiber_length=0.06853064
        tendon_slack_length=0.05622483 pennation_angle_at_optimal=0.3316126
      PathPoint P1: pelvis (-0.1253058 0.01075806 0.06639259)
      PathPoint P2: femur_r (-0.03544972 -0.005392028 0.05942703)
    Millard2012EquilibriumMuscle glut_min1_r: max_isometric_force=270 optimal_fiber_length=0.07328921
        tendon_slack_length=0.01724452 pennation_angle_at_optimal=0.1745329
      PathPoint P1: pelvis (-0.04784775 -0.008196616 0.1081953)
      PathPoint P2: femur_r (-0.008260128 -0.0119313 0.06424544)
    Millard2012EquilibriumMuscle glut_min2_r: max_isometric_force=285 optimal_fiber_length=0.06065928
        tendon_slack_length=0.02816324 pennation_angle_at_optimal=0
      PathPoint P1: pelvis (-0.06485573 -0.006659751 0.1015356)
      PathPoint P2: femur_r (-0.0110135 -0.0119313 0.06424544)
    Millard2012EquilibriumMuscle glut_min3_r: max_isometric_force=323 optimal_fiber_length=0.04117692
        tendon_slack_length=0.05526376 pennation_angle_at_optimal=0.01745329
      PathPoint P1: pelvis (-0.08544972 -0.006454835 0.08770379)
      PathPoint P2: femur_r (-0.01548774 -0.009522092 0.0630982)
    Millard2012EquilibriumMuscle semimem_r: max_isometric_force=1288 optimal_fiber_length=0.09098535
        tendon_slack_length=0.4082968 pennation_angle_at_optimal=0.2617994
      PathPoint P1: pelvis (-0.1221296 -0.09986552 0.0732675)
      ConditionalPathPoint P2: tibia_r (-0.0344006 -0.03478612 -0.01869297)
          socket_coordinate=/jointset/knee_r/knee_angle_r range=(-0.558505 0.174533) [radians]
      PathPoint P3: tibia_r (-0.02669012 -0.04716243 -0.0193454)
    Millard2012EquilibriumMuscle semiten_r: max_isometric_force=410 optimal_fiber_length=0.2252741
        tendon_slack_length=0.2863559 pennation_angle_at_optimal=0.08726646
      PathPoint P1: pelvis (-0.1294553 -0.1125805 0.06187421)
      ConditionalPathPoint P2: tibia_r (-0.04154762 -0.02826187 -0.02250867)
          socket_coordinate=/jointset/knee_r/knee_angle_r range=(-0.331613 0.174533)
      PathPoint P3: tibia_r (-0.03283873 -0.05221378 -0.02261741)
      PathPoint P4: tibia_r (-0.01117031 -0.07374382 -0.02421881)
      PathPoint P5: tibia_r (0.002669012 -0.0945028 -0.01907849)
    Millard2012EquilibriumMuscle bifemlh_r: max_isometric_force=896 optimal_fiber_length=0.1236311
        tendon_slack_length=0.369759 pennation_angle_at_optimal=0
      PathPoint P1: pelvis (-0.1290557 -0.1050909 0.07114663)
      PathPoint P2: tibia_r (-0.02975454 -0.03558683 0.02909223)
      PathPoint P3: tibia_r (-0.02313144 -0.05565384 0.03390634)
    Millard2012EquilibriumMuscle bifemsh_r: max_isometric_force=804 optimal_fiber_length=0.1914449
        tendon_slack_length=0.09848899 pennation_angle_at_optimal=0.4014257
      PathPoint P1: femur_r (0.0057362 -0.2421824 0.02684542)
      PathPoint P2: tibia_r (-0.02975454 -0.03558683 0.02909223)
      PathPoint P3: tibia_r (-0.02313144 -0.05565384 0.03390634)
    Millard2012EquilibriumMuscle sar_r: max_isometric_force=156 optimal_fiber_length=0.5742156
        tendon_slack_length=0.1104261 pennation_angle_at_optimal=0
      PathPoint P1: pelvis (-0.01567603 -0.00133195 0.1272525)
      PathPoint P2: femur_r (-0.00344172 -0.4093352 -0.0482988)
      PathPoint P3: tibia_r (-0.005535729 -0.04141911 -0.03944207)
      PathPoint P4: tibia_r (0.005931138 -0.058224 -0.03786043)
      PathPoint P5: tibia_r (0.02402111 -0.08303593 -0.02491078)
    Millard2012EquilibriumMuscle add_long_r: max_isometric_force=627 optimal_fiber_length=0.1570085
        tendon_slack_length=0.1251517 pennation_angle_at_optimal=0.1047198
      PathPoint P1: pelvis (-0.03237663 -0.08565464 0.01731535)
      PathPoint P2: femur_r (0.0057362 -0.2421824 0.02684542)
    Millard2012EquilibriumMuscle add_brev_r: max_isometric_force=429 optimal_fiber_length=0.1490375
        tendon_slack_length=0.02241165 pennation_angle_at_optimal=0
      PathPoint P1: pelvis (-0.06014267 -0.0937488 0.01680306)
      PathPoint P2: femur_r (0.001032516 -0.1372099 0.03372886)
    Millard2012EquilibriumMuscle add_mag1_r: max_isometric_force=381 optimal_fiber_length=0.09866288
        tendon_slack_length=0.06804336 pennation_angle_at_optimal=0.08726646
      PathPoint P1: pelvis (-0.07499904 -0.1202853 0.02612671)
      PathPoint P2: femur_r (-0.00516258 -0.1389308 0.03889144)
    Millard2012EquilibriumMuscle add_mag2_r: max_isometric_force=343 optimal_fiber_length=0.1409897
        tendon_slack_length=0.1398245 pennation_angle_at_optimal=0.05235988
      PathPoint P1: pelvis (-0.08514235 -0.1221296 0.03155697)
      PathPoint P2: femur_r (0.006195096 -0.2621443 0.02604235)
    Millard2012EquilibriumMuscle add_mag3_r: max_isometric_force=488 optimal_fiber_length=0.1522604
        tendon_slack_length=0.289411 pennation_angle_at_optimal=0.08726646
      PathPoint P1: pelvis (-0.11381 -0.116935 0.05001985)
      PathPoint P2: femur_r (0.00803068 -0.440196 -0.03051658)
    Millard2012EquilibriumMuscle tfl_r: max_isometric_force=233 optimal_fiber_length=0.1060379
        tendon_slack_length=0.4743801 pennation_angle_at_optimal=0.05235988
      PathPoint P1: pelvis (-0.03186435 0.02192595 0.12715)
      PathPoint P2: femur_r (0.03372886 -0.1141504 0.06849023)
      PathPoint P3: femur_r (0.006195096 -0.4645175 0.04095647)
      PathPoint P4: tibia_r (0.005931138 -0.04814107 0.02935913)
    Millard2012EquilibriumMuscle pect_r: max_isometric_force=266 optimal_fiber_length=0.1116559
        tendon_slack_length=0.03684646 pennation_angle_at_optimal=0
      PathPoint P1: pelvis (-0.04415927 -0.07868752 0.04620842)
      PathPoint P2: femur_r (-0.01399633 -0.09430313 0.02902517)
    Millard2012EquilibriumMuscle grac_r: max_isometric_force=162 optimal_fiber_length=0.3965859
        tendon_slack_length=0.1419597 pennation_angle_at_optimal=0.05235988
      PathPoint P1: pelvis (-0.07582895 -0.1216173 0.02862668)
      ConditionalPathPoint P2: tibia_r (-0.02626506 -0.03153388 -0.03730686)
          socket_coordinate=/jointset/knee_r/knee_angle_r range=(-0.436332 0.174533)
      PathPoint P3: tibia_r (-0.019207 -0.05093859 -0.03538912)
      PathPoint P4: tibia_r (0.005931138 -0.08264052 -0.02253832)
    Millard2012EquilibriumMuscle glut_max1_r: max_isometric_force=573 optimal_fiber_length=0.151587
        tendon_slack_length=0.1334393 pennation_angle_at_optimal=0.08726646
      PathPoint P1: pelvis (-0.122437 0.06270411 0.07172039)
      PathPoint P2: pelvis (-0.1322729 0.001229492 0.09077753)
      PathPoint P3: femur_r (-0.05242887 -0.02845155 0.04497181)
      PathPoint P4: femur_r (-0.03177855 -0.06493378 0.05392028)
    Millard2012EquilibriumMuscle glut_max2_r: max_isometric_force=819 optimal_fiber_length=0.1593947
        tendon_slack_length=0.1377084 pennation_angle_at_optimal=0
      PathPoint P1: pelvis (-0.1382154 0.01803256 0.05768369)
      PathPoint P2: pelvis (-0.1409818 -0.05327801 0.09364634)
      PathPoint P3: femur_r (-0.04887242 -0.06080372 0.03361413)
      PathPoint P4: femur_r (-0.01789694 -0.1165596 0.04806936)
    Millard2012EquilibriumMuscle glut_max3_r: max_isometric_force=552 optimal_fiber_length=0.1562884
        tendon_slack_length=0.1573737 pennation_angle_at_optimal=0.08726646
      PathPoint P1: pelvis (-0.1594242 -0.03217172 0.005942547)
      PathPoint P2: pelvis (-0.1566578 -0.1077855 0.04129045)
      PathPoint P3: femur_r (-0.03430248 -0.1194277 0.01548774)
      PathPoint P4: femur_r (-0.00688344 -0.1627934 0.04715156)
    Millard2012EquilibriumMuscle iliacus_r: max_isometric_force=1073 optimal_fiber_length=0.1061641
        tendon_slack_length=0.1061641 pennation_angle_at_optimal=0.1221731
      PathPoint P1: pelvis (-0.06905649 0.03739706 0.08749888)
      PathPoint P2: pelvis (-0.02643409 -0.05635174 0.0830932)
      ConditionalPathPoint P3: pelvis (-0.02950782 -0.08247845 0.08360549)
          socket_coordinate=/jointset/hip_r/hip_flexion_r range=(-1.5708 0.785398)
      PathPoint P4: femur_r (0.001950308 -0.06229513 0.006539268)
      PathPoint P5: femur_r (-0.02214173 -0.0712436 0.0147994)
    Millard2012EquilibriumMuscle psoas_r: max_isometric_force=1113 optimal_fiber_length=0.1051723
        tendon_slack_length=0.1682757 pennation_angle_at_optimal=0.1396263
      PathPoint P1: pelvis (-0.06629013 0.09087998 0.02961028)
      PathPoint P2: pelvis (-0.02438493 -0.05840089 0.0777654)
      ConditionalPathPoint P3: pelvis (-0.02950782 -0.08247845 0.08360549)
          socket_coordinate=/jointset/hip_r/hip_flexion_r range=(-1.5708 0.785398)
      PathPoint P4: femur_r (0.001835584 -0.05816507 0.004359512)
      PathPoint P5: femur_r (-0.02156811 -0.06849023 0.0119313)
    Millard2012EquilibriumMuscle quad_fem_r: max_isometric_force=381 optimal_fiber_length=0.05807418
        tendon_slack_length=0.02581075 pennation_angle_at_optimal=0
      PathPoint P1: pelvis (-0.1171092 -0.1179288 0.05327801)
      PathPoint P2: femur_r (-0.04370984 -0.04118592 0.04198898)
    Millard2012EquilibriumMuscle gem_r: max_isometric_force=164 optimal_fiber_length=0.02609439
        tendon_slack_length=0.04240338 pennation_angle_at_optimal=0
      PathPoint P1: pelvis (-0.1160846 -0.08401532 0.0731548)
      PathPoint P2: femur_r (-0.01629081 -0.003785892 0.05082273)
    Millard2012EquilibriumMuscle peri_r: max_isometric_force=444 optimal_fiber_length=0.02732926
        tendon_slack_length=0.1208794 pennation_angle_at_optimal=0.1745329
      PathPoint P1: pelvis (-0.143031 0.0003073731 0.02407756)
      PathPoint P2: pelvis (-0.122232 -0.02827833 0.06731471)
      PathPoint P3: femur_r (-0.01697915 -0.004130064 0.05013439)
    Millard2012EquilibriumMuscle rect_fem_r: max_isometric_force=1169 optimal_fiber_length=0.1304623
        tendon_slack_length=0.354766 pennation_angle_at_optimal=0.08726646
      PathPoint P1: pelvis (-0.03022502 -0.03186435 0.09917906)
      ConditionalPathPoint P2: femur_r (0.03831782 -0.4623377 0.002179756)
          socket_coordinate=/jointset/knee_r/knee_angle_r range=(-2.61799 -1.45997)
      MovingPathPoint P3: tibia_r socket_x_coordinate=/jointset/knee_r/knee_angle_r
          socket_y_coordinate=/jointset/knee_r/knee_angle_r socket_z_coordinate=/jointset/knee_r/knee_angle_r
        x_location: MultiplierFunction: scale=0.988523
          SimmSpline: x=(-2.0944 -1.99997 -1.5708 -1.45752 -1.39626 -1.0472 -0.698132 -0.526391 -0.349066 -0.174533 0 0.00017453 0.00034907 0.0279253 0.0872665 0.174533 2.0944)
              y=(0.0155805 0.0179938 0.0275081 0.0296564 0.0307615 0.0365695 0.0422074 0.0450902 0.048391 0.0534299 0.0617576 0.0617669 0.0617762 0.0633083 0.066994 0.0733035 0.0573481)
        y_location: MultiplierFunction: scale=0.988523
          SimmSpline: x=(-2.0944 -1.99997 -1.5708 -1.45752 -1.39626 -1.0472 -0.698132 -0.526391 -0.349066 -0.174533 0 0.00017453 0.00034907 0.0279253 0.0872665 0.174533 2.0944)
              y=(0.0234116 0.0237613 0.0251141 0.0252795 0.0253146 0.0249184 0.0242373 0.0238447 0.0234197 0.0227644 0.020984 0.0209814 0.0209788 0.0205225 0.0191754 0.0159554 -0.0673774)
        z_location: MultiplierFunction: scale=0.988523
          SimmSpline: x=(-2.0944 0.1745) y=(0.0014 0.0014)
    Millard2012EquilibriumMuscle vas_med_r: max_isometric_force=1294 optimal_fiber_length=0.1031382
        tendon_slack_length=0.1460159 pennation_angle_at_optimal=0.08726646
      PathPoint P1: femur_r (0.01606136 -0.2408057 0.02156811)
      PathPoint P2: femur_r (0.04084174 -0.3176708 0.001032516)
      ConditionalPathPoint P3: femur_r (0.04244788 -0.4644028 -0.0143405)
          socket_coordinate=/jointset/knee_r/knee_angle_r range=(-2.61799 -1.21004)
      ConditionalPathPoint P4: femur_r (0.03143438 -0.4881506 -0.01502884)
          socket_coordinate=/jointset/knee_r/knee_angle_r range=(-2.61799 -1.78006)
      MovingPathPoint P5: tibia_r socket_x_coordinate=/jointset/knee_r/knee_angle_r
          socket_y_coordinate=/jointset/knee_r/knee_angle_r socket_z_coordinate=/jointset/knee_r/knee_angle_r
        x_location: MultiplierFunction: scale=0.988523
          SimmSpline: x=(-2.0944 -1.99997 -1.5708 -1.45752 -1.39626 -1.0472 -0.698132 -0.526391 -0.349066 -0.174533 0 0.00017453 0.00034907 0.0279253 0.0872665 0.174533 2.0944)
              y=(0.00981097 0.0122243 0.0217371 0.0238851 0.0249902 0.0307959 0.0364187 0.0392871 0.0425654 0.0475764 0.0559586 0.0559681 0.0559776 0.0575419 0.0613368 0.0679503 0.0629332)
        y_location: MultiplierFunction: scale=0.988523
          SimmSpline: x=(-2.0944 -1.99997 -1.5708 -1.45752 -1.39626 -1.0472 -0.698132 -0.526391 -0.349066 -0.174533 0 0.00017453 0.00034907 0.0279253 0.0872665 0.174533 2.0944)
              y=(0.0224154 0.0227651 0.0241265 0.0242933 0.0243287 0.0239462 0.0233593 0.0230677 0.0228342 0.0226362 0.0217917 0.0217903 0.0217889 0.0215365 0.0206842 0.0183269 -0.0656205)
        z_location: MultiplierFunction: scale=0.988523
          SimmSpline: x=(-2.0944 2.0944) y=(-0.0146 -0.0146)
    Millard2012EquilibriumMuscle vas_int_r: max_isometric_force=1365 optimal_fiber_length=0.1013743
        tendon_slack_length=0.1584701 pennation_angle_at_optimal=0.05235988
      PathPoint P1: femur_r (0.03326996 -0.220729 0.03556444)
      PathPoint P2: femur_r (0.03843254 -0.2390848 0.03269634)
      ConditionalPathPoint P3: femur_r (0.03935033 -0.4623377 0.00630982)
          socket_coordinate=/jointset/knee_r/knee_angle_r range=(-2.61799 -1.42)
      MovingPathPoint P4: tibia_r socket_x_coordinate=/jointset/knee_r/knee_angle_r
          socket_y_coordinate=/jointset/knee_r/knee_angle_r socket_z_coordinate=/jointset/knee_r/knee_angle_r
        x_location: MultiplierFunction: scale=0.988523
          SimmSpline: x=(-2.0944 -1.99997 -1.5708 -1.45752 -1.39626 -1.0472 -0.698132 -0.526391 -0.349066 -0.174533 0 0.00017453 0.00034907 0.0279253 0.0872665 0.174533 2.0944)
              y=(0.0082733 0.0106866 0.0202042 0.022353 0.0234583 0.0292715 0.0349465 0.037871 0.0412569 0.0465287 0.0554632 0.0554735 0.0554837 0.0571717 0.061272 0.0684368 0.0648818)
        y_location: MultiplierFunction: scale=0.988523
          SimmSpline: x=(-2.0944 -1.99997 -1.5708 -1.45752 -1.39626 -1.0472 -0.698132 -0.526391 -0.349066 -0.174533 0 0.00017453 0.00034907 0.0279253 0.0872665 0.174533 2.0944)
              y=(0.025599 0.0259487 0.0273124 0.0274796 0.0275151 0.0271363 0.0265737 0.0263073 0.0261187 0.0260129 0.0252923 0.0252911 0.0252898 0.0250526 0.0242191 0.0218288 -0.0685706)
        z_location: MultiplierFunction: scale=0.988523
          SimmSpline: x=(-2.0944 2.0944) y=(0.0018 0.0018)
    Millard2012EquilibriumMuscle vas_lat_r: max_isometric_force=1871 optimal_fiber_length=0.09705652
        tendon_slack_length=0.1814032 pennation_angle_at_optimal=0.08726646
      PathPoint P1: femur_r (0.005506752 -0.2126983 0.04003868)
      PathPoint P2: femur_r (0.03086076 -0.2972499 0.04692212)
      ConditionalPathPoint P3: femur_r (0.04141536 -0.4623377 0.02351842)
          socket_coordinate=/jointset/knee_r/knee_angle_r range=(-2.61799 -1.21004)
      ConditionalPathPoint P4: femur_r (0.02902517 -0.4867739 0.02110922)
          socket_coordinate=/jointset/knee_r/knee_angle_r range=(-2.61799 -1.92004)
      MovingPathPoint P5: tibia_r socket_x_coordinate=/jointset/knee_r/knee_angle_r
          socket_y_coordinate=/jointset/knee_r/knee_angle_r socket_z_coordinate=/jointset/knee_r/knee_angle_r
        x_location: MultiplierFunction: scale=0.988523
          SimmSpline: x=(-2.0944 -1.99997 -1.5708 -1.45752 -1.39626 -1.0472 -0.698132 -0.526391 -0.349066 -0.174533 0 0.00017453 0.00034907 0.0279253 0.0872665 0.174533 2.0944)
              y=(0.0142897 0.016703 0.0262145 0.0283623 0.0294674 0.0352709 0.0408785 0.0437291 0.0469704 0.0518742 0.0599557 0.0599647 0.0599738 0.0614577 0.0650351 0.0711867 0.0583766)
        y_location: MultiplierFunction: scale=0.988523
          SimmSpline: x=(-2.0944 -1.99997 -1.5708 -1.45752 -1.39626 -1.0472 -0.698132 -0.526391 -0.349066 -0.174533 0 0.00017453 0.00034907 0.0279253 0.0872665 0.174533 2.0944)
              y=(0.0215318 0.0218815 0.0232362 0.0234019 0.0234371 0.0230439 0.0223842 0.0220151 0.0216359 0.0210971 0.0195864 0.0195842 0.019582 0.01919 0.018008 0.0151073 -0.0653421)
        z_location: MultiplierFunction: scale=0.988523
          SimmSpline: x=(-2.0944 2.0944) y=(0.0165 0.0165)
    Millard2012EquilibriumMuscle med_gas_r: max_isometric_force=1558 optimal_fiber_length=0.0600858
        tendon_slack_length=0.3905577 pennation_angle_at_optimal=0.296706
      PathPoint P1: femur_r (-0.02179756 -0.4507506 -0.02696014)
      ConditionalPathPoint P2: femur_r (-0.0344172 -0.4614199 -0.02959879)
          socket_coordinate=/jointset/knee_r/knee_angle_r range=(-0.785398 0.174533)
      PathPoint P3: calcn_r (0 0.03183963 -0.005443549)
    Millard2012EquilibriumMuscle lat_gas_r: max_isometric_force=683 optimal_fiber_length=0.06400235
        tendon_slack_length=0.380014 pennation_angle_at_optimal=0.1396263
      PathPoint P1: femur_r (-0.02523928 -0.4527009 0.03120493)
      ConditionalPathPoint P2: femur_r (-0.0344172 -0.460961 0.03143438)
          socket_coordinate=/jointset/knee_r/knee_angle_r range=(-0.785398 0.174533)
      PathPoint P3: calcn_r (0 0.03183963 -0.005443549)
    Millard2012EquilibriumMuscle soleus_r: max_isometric_force=3549 optimal_fiber_length=0.0502888
        tendon_slack_length=0.251444 pennation_angle_at_optimal=0.4363323
      PathPoint P1: tibia_r (-0.002372455 -0.1515406 0.007018513)
      PathPoint P2: calcn_r (0 0.03183963 -0.005443549)
    Millard2012EquilibriumMuscle tib_post_r: max_isometric_force=1588 optimal_fiber_length=0.03107549
        tendon_slack_length=0.3107549 pennation_angle_at_optimal=0.2094395
      PathPoint P1: tibia_r (-0.009292116 -0.1332529 0.001878194)
      PathPoint P2: tibia_r (-0.01423473 -0.4004507 -0.02263718)
      PathPoint P3: calcn_r (0.04282943 0.03430463 -0.02937462)
      PathPoint P4: calcn_r (0.07929094 0.01633065 -0.02886108)
    Millard2012EquilibriumMuscle flex_dig_r: max_isometric_force=310 optimal_fiber_length=0.0344375
        tendon_slack_length=0.4051471 pennation_angle_at_optimal=0.1221731
      PathPoint P1: tibia_r (-0.008204741 -0.2022518 -0.001779341)
      PathPoint P2: tibia_r (-0.01522325 -0.4004507 -0.01937505)
      PathPoint P3: calcn_r (0.0447809 0.03235317 -0.02875837)
      PathPoint P4: calcn_r (0.0727176 0.01807669 -0.02701233)
      PathPoint P5: calcn_r (0.1702907 -0.008319387 0.01191418)
      PathPoint P6: toes_r (-0.001951461 -0.008011261 0.01509815)
      PathPoint P7: toes_r (0.02927192 -0.007292302 0.02208232)
      PathPoint P8: toes_r (0.04529444 -0.006162509 0.02485545)
    Millard2012EquilibriumMuscle flex_hal_r: max_isometric_force=322 optimal_fiber_length=0.04367407
        tendon_slack_length=0.3859569 pennation_angle_at_optimal=0.1745329
      PathPoint P1: tibia_r (-0.007809332 -0.2307213 0.02411996)
      PathPoint P2: tibia_r (-0.01838653 -0.4032185 -0.0172003)
      PathPoint P3: calcn_r (0.03841297 0.02834754 -0.02475274)
      PathPoint P4: calcn_r (0.1066114 0.006984176 -0.02629337)
      PathPoint P5: calcn_r (0.1772748 -0.005443549 -0.02762858)
      PathPoint P6: toes_r (0.01591981 -0.006573343 -0.02721775)
      PathPoint P7: toes_r (0.05772216 -0.01047626 -0.01859023)
    Millard2012EquilibriumMuscle tib_ant_r: max_isometric_force=905 optimal_fiber_length=0.09791263
        tendon_slack_length=0.2228012 pennation_angle_at_optimal=0.08726646
      PathPoint P1: tibia_r (0.01769456 -0.1605361 0.01136801)
      PathPoint P2: tibia_r (0.03252241 -0.3905654 -0.01749686)
      PathPoint P3: calcn_r (0.1197581 0.01828211 -0.03132609)
    Millard2012EquilibriumMuscle per_brev_r: max_isometric_force=435 optimal_fiber_length=0.05004055
        tendon_slack_length=0.1611306 pennation_angle_at_optimal=0.08726646
      PathPoint P1: tibia_r (-0.006919661 -0.2615632 0.032127)
      PathPoint P2: tibia_r (-0.01957276 -0.413598 0.0279752)
      PathPoint P3: tibia_r (-0.01423473 -0.4245706 0.02856831)
      PathPoint P4: calcn_r (0.04837569 0.02773129 0.02393108)
      PathPoint P5: calcn_r (0.06953364 0.02249316 0.03522901)
    Millard2012EquilibriumMuscle per_long_r: max_isometric_force=943 optimal_fiber_length=0.04918451
        tendon_slack_length=0.3462991 pennation_angle_at_optimal=0.1745329
      PathPoint P1: tibia_r (0.0004942615 -0.1550004 0.03578453)
      PathPoint P2: tibia_r (-0.02046243 -0.4156739 0.02827176)
      PathPoint P3: tibia_r (-0.01601407 -0.4269431 0.02856831)
      PathPoint P4: calcn_r (0.04498631 0.02362295 0.02269857)
      PathPoint P5: calcn_r (0.06994447 0.0108871 0.02916921)
      PathPoint P6: calcn_r (0.08750762 0.007086885 0.0121196)
      PathPoint P7: calcn_r (0.1235583 0.008730221 -0.01889836)
    Millard2012EquilibriumMuscle per_tert_r: max_isometric_force=180 optimal_fiber_length=0.07988519
        tendon_slack_length=0.1011205 pennation_angle_at_optimal=0.2268928
      PathPoint P1: tibia_r (0.000988523 -0.2771818 0.02283488)
      PathPoint P2: tibia_r (0.02263718 -0.40223 0.01571752)
      PathPoint P3: calcn_r (0.08802116 0.02341753 0.03070983)
    Millard2012EquilibriumMuscle ext_dig_r: max_isometric_force=512 optimal_fiber_length=0.102694
        tendon_slack_length=0.3473473 pennation_angle_at_optimal=0.1396263
      PathPoint P1: tibia_r (0.003163274 -0.136515 0.02728323)
      PathPoint P2: tibia_r (0.02856831 -0.3961012 0.007117366)
      PathPoint P3: calcn_r (0.09469722 0.03985089 -0.0001027085)
      PathPoint P4: calcn_r (0.1659769 0.005648966 0.0133521)
      PathPoint P5: toes_r (0.0003081254 0.004827298 0.0157144)
      PathPoint P6: toes_r (0.04549986 -0.0004108339 0.02567712)
    Millard2012EquilibriumMuscle ext_hal_r: max_isometric_force=162 optimal_fiber_length=0.1119446
        tendon_slack_length=0.3075954 pennation_angle_at_optimal=0.1047198
      PathPoint P1: tibia_r (0.001186228 -0.174672 0.02253832)
      PathPoint P2: tibia_r (0.03222585 -0.3939264 -0.008402446)
      PathPoint P3: calcn_r (0.09962722 0.0399536 -0.02167149)
      PathPoint P4: calcn_r (0.1328021 0.03173692 -0.02639608)
      PathPoint P5: calcn_r (0.1780965 0.01427648 -0.02875837)
      PathPoint P6: toes_r (0.03060713 0.004211048 -0.02516358)
      PathPoint P7: toes_r (0.05782487 0.003492088 -0.01910378)
    Millard2012EquilibriumMuscle glut_med1_l: max_isometric_force=819 optimal_fiber_length=0.05640635
        tendon_slack_length=0.08223729 pennation_angle_at_optimal=0.1396263
      PathPoint P1: pelvis (-0.04180274 0.03114714 -0.1238714)
      PathPoint P2: femur_l (-0.02500983 -0.01342271 -0.06367182)
    Millard2012EquilibriumMuscle glut_med2_l: max_isometric_force=573 optimal_fiber_length=0.08913177
        tendon_slack_length=0.05590513 pennation_angle_at_optimal=0
      PathPoint P1: pelvis (-0.08760134 0.04559368 -0.0784826)
      PathPoint P2: femur_l (-0.02959879 -0.006653992 -0.06045955)
    Millard2012EquilibriumMuscle glut_med3_l: max_isometric_force=653 optimal_fiber_length=0.06853064
        tendon_slack_length=0.05622483 pennation_angle_at_optimal=0.3316126
      PathPoint P1: pelvis (-0.1253058 0.01075806 -0.06639259)
      PathPoint P2: femur_l (-0.03544972 -0.005392028 -0.05942703)
    Millard2012EquilibriumMuscle glut_min1_l: max_isometric_force=270 optimal_fiber_length=0.07328921
        tendon_slack_length=0.01724452 pennation_angle_at_optimal=0.1745329
      PathPoint P1: pelvis (-0.04784775 -0.008196616 -0.1081953)
      PathPoint P2: femur_l (-0.008260128 -0.0119313 -0.06424544)
    Millard2012EquilibriumMuscle glut_min2_l: max_isometric_force=285 optimal_fiber_length=0.06065928
        tendon_slack_length=0.02816324 pennation_angle_at_optimal=0
      PathPoint P1: pelvis (-0.06485573 -0.006659751 -0.1015356)
      PathPoint P2: femur_l (-0.0110135 -0.0119313 -0.06424544)
    Millard2012EquilibriumMuscle glut_min3_l: max_isometric_force=323 optimal_fiber_length=0.04117692
        tendon_slack_length=0.05526376 pennation_angle_at_optimal=0.01745329
      PathPoint P1: pelvis (-0.08544972 -0.006454835 -0.08770379)
      PathPoint P2: femur_l (-0.01548774 -0.009522092 -0.0630982)
    Millard2012EquilibriumMuscle semimem_l: max_isometric_force=1288 optimal_fiber_length=0.09098535
        tendon_slack_length=0.4082968 pennation_angle_at_optimal=0.2617994
      PathPoint P1: pelvis (-0.1221296 -0.09986552 -0.0732675)
      ConditionalPathPoint P2: tibia_l (-0.0344006 -0.03478612 0.01869297)
          socket_coordinate=/jointset/knee_l/knee_angle_l range=(-0.558505 0.174533)
      PathPoint P3: tibia_l (-0.02669012 -0.04716243 0.0193454)
    Millard2012EquilibriumMuscle semiten_l: max_isometric_force=410 optimal_fiber_length=0.2252741
        tendon_slack_length=0.2863559 pennation_angle_at_optimal=0.08726646
      PathPoint P1: pelvis (-0.1294553 -0.1125805 -0.06187421)
      ConditionalPathPoint P2: tibia_l (-0.04154762 -0.02826187 0.02250867)
          socket_coordinate=/jointset/knee_l/knee_angle_l range=(-0.331613 0.174533)
      PathPoint P3: tibia_l (-0.03283873 -0.05221378 0.02261741)
      PathPoint P4: tibia_l (-0.01117031 -0.07374382 0.02421881)
      PathPoint P5: tibia_l (0.002669012 -0.0945028 0.01907849)
    Millard2012EquilibriumMuscle bifemlh_l: max_isometric_force=896 optimal_fiber_length=0.1236311
        tendon_slack_length=0.369759 pennation_angle_at_optimal=0
      PathPoint P1: pelvis (-0.1290557 -0.1050909 -0.07114663)
      PathPoint P2: tibia_l (-0.02975454 -0.03558683 -0.02909223)
      PathPoint P3: tibia_l (-0.02313144 -0.05565384 -0.03390634)
    Millard2012EquilibriumMuscle bifemsh_l: max_isometric_force=804 optimal_fiber_length=0.1914449
        tendon_slack_length=0.09848899 pennation_angle_at_optimal=0.4014257
      PathPoint P1: femur_l (0.0057362 -0.2421824 -0.02684542)
      PathPoint P2: tibia_l (-0.02975454 -0.03558683 -0.02909223)
      PathPoint P3: tibia_l (-0.02313144 -0.05565384 -0.03390634)
    Millard2012EquilibriumMuscle sar_l: max_isometric_force=156 optimal_fiber_length=0.5742156
        tendon_slack_length=0.1104261 pennation_angle_at_optimal=0
      PathPoint P1: pelvis (-0.01567603 -0.00133195 -0.1272525)
      PathPoint P2: femur_l (-0.00344172 -0.4093352 0.0482988)
      PathPoint P3: tibia_l (-0.005535729 -0.04141911 0.03944207)
      PathPoint P4: tibia_l (0.005931138 -0.058224 0.03786043)
      PathPoint P5: tibia_l (0.02402111 -0.08303593 0.02491078)
    Millard2012EquilibriumMuscle add_long_l: max_isometric_force=627 optimal_fiber_length=0.1570085
        tendon_slack_length=0.1251517 pennation_angle_at_optimal=0.1047198
      PathPoint P1: pelvis (-0.03237663 -0.08565464 -0.01731535)
      PathPoint P2: femur_l (0.0057362 -0.2421824 -0.02684542)
    Millard2012EquilibriumMuscle add_brev_l: max_isometric_force=429 optimal_fiber_length=0.1490375
        tendon_slack_length=0.02241165 pennation_angle_at_optimal=0
      PathPoint P1: pelvis (-0.06014267 -0.0937488 -0.01680306)
      PathPoint P2: femur_l (0.001032516 -0.1372099 -0.03372886)
    Millard2012EquilibriumMuscle add_mag1_l: max_isometric_force=381 optimal_fiber_length=0.09866288
        tendon_slack_length=0.06804336 pennation_angle_at_optimal=0.08726646
      PathPoint P1: pelvis (-0.07499904 -0.1202853 -0.02612671)
      PathPoint P2: femur_l (-0.00516258 -0.1389308 -0.03889144)
    Millard2012EquilibriumMuscle add_mag2_l: max_isometric_force=343 optimal_fiber_length=0.1409897
        tendon_slack_length=0.1398245 pennation_angle_at_optimal=0.05235988
      PathPoint P1: pelvis (-0.08514235 -0.1221296 -0.03155697)
      PathPoint P2: femur_l (0.006195096 -0.2621443 -0.02604235)
    Millard2012EquilibriumMuscle add_mag3_l: max_isometric_force=488 optimal_fiber_length=0.1522604
        tendon_slack_length=0.289411 pennation_angle_at_optimal=0.08726646
      PathPoint P1: pelvis (-0.11381 -0.116935 -0.05001985)
      PathPoint P2: femur_l (0.00803068 -0.440196 0.03051658)
    Millard2012EquilibriumMuscle tfl_l: max_isometric_force=233 optimal_fiber_length=0.1060379
        tendon_slack_length=0.4743801 pennation_angle_at_optimal=0.05235988
      PathPoint P1: pelvis (-0.03186435 0.02192595 -0.12715)
      PathPoint P2: femur_l (0.03372886 -0.1141504 -0.06849023)
      PathPoint P3: femur_l (0.006195096 -0.4645175 -0.04095647)
      PathPoint P4: tibia_l (0.005931138 -0.04814107 -0.02935913)
    Millard2012EquilibriumMuscle pect_l: max_isometric_force=266 optimal_fiber_length=0.1116559
        tendon_slack_length=0.03684646 pennation_angle_at_optimal=0
      PathPoint P1: pelvis (-0.04415927 -0.07868752 -0.04620842)
      PathPoint P2: femur_l (-0.01399633 -0.09430313 -0.02902517)
    Millard2012EquilibriumMuscle grac_l: max_isometric_force=162 optimal_fiber_length=0.3965859
        tendon_slack_length=0.1419597 pennation_angle_at_optimal=0.05235988
      PathPoint P1: pelvis (-0.07582895 -0.1216173 -0.02862668)
      ConditionalPathPoint P2: tibia_l (-0.02626506 -0.03153388 0.03730686)
          socket_coordinate=/jointset/knee_l/knee_angle_l range=(-0.436332 0.174533)
      PathPoint P3: tibia_l (-0.019207 -0.05093859 0.03538912)
      PathPoint P4: tibia_l (0.005931138 -0.08264052 0.02253832)
    Millard2012EquilibriumMuscle glut_max1_l: max_isometric_force=573 optimal_fiber_length=0.151587
        tendon_slack_length=0.1334393 pennation_angle_at_optimal=0.08726646
      PathPoint P1: pelvis (-0.122437 0.06270411 -0.07172039)
      PathPoint P2: pelvis (-0.1322729 0.001229492 -0.09077753)
      PathPoint P3: femur_l (-0.05242887 -0.02845155 -0.04497181)
      PathPoint P4: femur_l (-0.03177855 -0.06493378 -0.05392028)
    Millard2012EquilibriumMuscle glut_max2_l: max_isometric_force=819 optimal_fiber_length=0.1593947
        tendon_slack_length=0.1377084 pennation_angle_at_optimal=0
      PathPoint P1: pelvis (-0.1382154 0.01803256 -0.05768369)
      PathPoint P2: pelvis (-0.1409818 -0.05327801 -0.09364634)
      PathPoint P3: femur_l (-0.04887242 -0.06080372 -0.03361413)
      PathPoint P4: femur_l (-0.01789694 -0.1165596 -0.04806936)
    Millard2012EquilibriumMuscle glut_max3_l: max_isometric_force=552 optimal_fiber_length=0.1562884
        tendon_slack_length=0.1573737 pennation_angle_at_optimal=0.08726646
      PathPoint P1: pelvis (-0.1594242 -0.03217172 -0.005942547)
      PathPoint P2: pelvis (-0.1566578 -0.1077855 -0.04129045)
      PathPoint P3: femur_l (-0.03430248 -0.1194277 -0.01548774)
      PathPoint P4: femur_l (-0.00688344 -0.1627934 -0.04715156)
    Millard2012EquilibriumMuscle iliacus_l: max_isometric_force=1073 optimal_fiber_length=0.1061641
        tendon_slack_length=0.1061641 pennation_angle_at_optimal=0.1221731
      PathPoint P1: pelvis (-0.06905649 0.03739706 -0.08749888)
      PathPoint P2: pelvis (-0.02643409 -0.05635174 -0.0830932)
      ConditionalPathPoint P3: pelvis (-0.02950782 -0.08247845 -0.08360549)
          socket_coordinate=/jointset/hip_l/hip_flexion_l range=(-1.5708 0.785398)
      PathPoint P4: femur_l (0.001950308 -0.06229513 -0.006539268)
      PathPoint P5: femur_l (-0.02214173 -0.0712436 -0.0147994)
    Millard2012EquilibriumMuscle psoas_l: max_isometric_force=1113 optimal_fiber_length=0.1051723
        tendon_slack_length=0.1682757 pennation_angle_at_optimal=0.1396263
      PathPoint P1: pelvis (-0.06629013 0.09087998 -0.02961028)
      PathPoint P2: pelvis (-0.02438493 -0.05840089 -0.0777654)
      ConditionalPathPoint P3: pelvis (-0.02950782 -0.08247845 -0.08360549)
          socket_coordinate=/jointset/hip_l/hip_flexion_l range=(-1.5708 0.785398)
      PathPoint P4: femur_l (0.001835584 -0.05816507 -0.004359512)
      PathPoint P5: femur_l (-0.02156811 -0.06849023 -0.0119313)
    Millard2012EquilibriumMuscle quad_fem_l: max_isometric_force=381 optimal_fiber_length=0.05807418
        tendon_slack_length=0.02581075 pennation_angle_at_optimal=0
      PathPoint P1: pelvis (-0.1171092 -0.1179288 -0.05327801)
      PathPoint P2: femur_l (-0.04370984 -0.04118592 -0.04198898)
    Millard2012EquilibriumMuscle gem_l: max_isometric_force=164 optimal_fiber_length=0.02609439
        tendon_slack_length=0.04240338 pennation_angle_at_optimal=0
      PathPoint P1: pelvis (-0.1160846 -0.08401532 -0.0731548)
      PathPoint P2: femur_l (-0.01629081 -0.003785892 -0.05082273)
    Millard2012EquilibriumMuscle peri_l: max_isometric_force=444 optimal_fiber_length=0.02732926
        tendon_slack_length=0.1208794 pennation_angle_at_optimal=0.1745329
      PathPoint P1: pelvis (-0.143031 0.0003073731 -0.02407756)
      PathPoint P2: pelvis (-0.122232 -0.02827833 -0.06731471)
      PathPoint P3: femur_l (-0.01697915 -0.004130064 -0.05013439)
    Millard2012EquilibriumMuscle rect_fem_l: max_isometric_force=1169 optimal_fiber_length=0.1304623
        tendon_slack_length=0.354766 pennation_angle_at_optimal=0.08726646
      PathPoint P1: pelvis (-0.03022502 -0.03186435 -0.09917906)
      ConditionalPathPoint P2: femur_l (0.03831782 -0.4623377 -0.002179756)
          socket_coordinate=/jointset/knee_l/knee_angle_l range=(-2.61799 -1.45997)
      MovingPathPoint P3: tibia_l socket_x_coordinate=/jointset/knee_l/knee_angle_l
          socket_y_coordinate=/jointset/knee_l/knee_angle_l socket_z_coordinate=/jointset/knee_l/knee_angle_l
        x_location: MultiplierFunction: scale=0.988523
          SimmSpline: x=(-2.0944 -1.99997 -1.5708 -1.45752 -1.39626 -1.0472 -0.698132 -0.526391 -0.349066 -0.174533 0 0.00017453 0.00034907 0.0279253 0.0872665 0.174533 2.0944)
              y=(0.0155805 0.0179938 0.0275081 0.0296564 0.0307615 0.0365695 0.0422074 0.0450902 0.048391 0.0534299 0.0617576 0.0617669 0.0617762 0.0633083 0.066994 0.0733035 0.0573481)
        y_location: MultiplierFunction: scale=0.988523
          SimmSpline: x=(-2.0944 -1.99997 -1.5708 -1.45752 -1.39626 -1.0472 -0.698132 -0.526391 -0.349066 -0.174533 0 0.00017453 0.00034907 0.0279253 0.0872665 0.174533 2.0944)
              y=(0.0234116 0.0237613 0.0251141 0.0252795 0.0253146 0.0249184 0.0242373 0.0238447 0.0234197 0.0227644 0.020984 0.0209814 0.0209788 0.0205225 0.0191754 0.0159554 -0.0673774)
        z_location: MultiplierFunction: scale=0.988523
          SimmSpline: x=(-2.0944 0.1745) y=(-0.0014 -0.0014)
    Millard2012EquilibriumMuscle vas_med_l: max_isometric_force=1294 optimal_fiber_length=0.1031382
        tendon_slack_length=0.1460159 pennation_angle_at_optimal=0.08726646
      PathPoint P1: femur_l (0.01606136 -0.2408057 -0.02156811)
      PathPoint P2: femur_l (0.04084174 -0.3176708 -0.001032516)
      ConditionalPathPoint P3: femur_l (0.04244788 -0.4644028 0.0143405)
          socket_coordinate=/jointset/knee_l/knee_angle_l range=(-2.61799 -1.21004)
      ConditionalPathPoint P4: femur_l (0.03143438 -0.4881506 0.01502884)
          socket_coordinate=/jointset/knee_l/knee_angle_l range=(-2.61799 -1.78006)
      MovingPathPoint P5: tibia_l socket_x_coordinate=/jointset/knee_l/knee_angle_l
          socket_y_coordinate=/jointset/knee_l/knee_angle_l socket_z_coordinate=/jointset/knee_l/knee_angle_l
        x_location: MultiplierFunction: scale=0.988523
          SimmSpline: x=(-2.0944 -1.99997 -1.5708 -1.45752 -1.39626 -1.0472 -0.698132 -0.526391 -0.349066 -0.174533 0 0.00017453 0.00034907 0.0279253 0.0872665 0.174533 2.0944)
              y=(0.00981097 0.0122243 0.0217371 0.0238851 0.0249902 0.0307959 0.0364187 0.0392871 0.0425654 0.0475764 0.0559586 0.0559681 0.0559776 0.0575419 0.0613368 0.0679503 0.0629332)
        y_location: MultiplierFunction: scale=0.988523
          SimmSpline: x=(-2.0944 -1.99997 -1.5708 -1.45752 -1.39626 -1.0472 -0.698132 -0.526391 -0.349066 -0.174533 0 0.00017453 0.00034907 0.0279253 0.0872665 0.174533 2.0944)
              y=(0.0224154 0.0227651 0.0241265 0.0242933 0.0243287 0.0239462 0.0233593 0.0230677 0.0228342 0.0226362 0.0217917 0.0217903 0.0217889 0.0215365 0.0206842 0.0183269 -0.0656205)
        z_location: MultiplierFunction: scale=0.988523
          SimmSpline: x=(-2.0944 2.0944) y=(0.0146 0.0146)
    Millard2012EquilibriumMuscle vas_int_l: max_isometric_force=1365 optimal_fiber_length=0.1013743
        tendon_slack_length=0.1584701 pennation_angle_at_optimal=0.05235988
      PathPoint P1: femur_l (0.03326996 -0.220729 -0.03556444)
      PathPoint P2: femur_l (0.03843254 -0.2390848 -0.03269634)
      ConditionalPathPoint P3: femur_l (0.03935033 -0.4623377 -0.00630982)
          socket_coordinate=/jointset/knee_l/knee_angle_l range=(-2.61799 -1.42)
      MovingPathPoint P4: tibia_l socket_x_coordinate=/jointset/knee_l/knee_angle_l
          socket_y_coordinate=/jointset/knee_l/knee_angle_l socket_z_coordinate=/jointset/knee_l/knee_angle_l
        x_location: MultiplierFunction: scale=0.988523
          SimmSpline: x=(-2.0944 -1.99997 -1.5708 -1.45752 -1.39626 -1.0472 -0.698132 -0.526391 -0.349066 -0.174533 0 0.00017453 0.00034907 0.0279253 0.0872665 0.174533 2.0944)
              y=(0.0082733 0.0106866 0.0202042 0.022353 0.0234583 0.0292715 0.0349465 0.037871 0.0412569 0.0465287 0.0554632 0.0554735 0.0554837 0.0571717 0.061272 0.0684368 0.0648818)
        y_location: MultiplierFunction: scale=0.988523
          SimmSpline: x=(-2.0944 -1.99997 -1.5708 -1.45752 -1.39626 -1.0472 -0.698132 -0.526391 -0.349066 -0.174533 0 0.00017453 0.00034907 0.0279253 0.0872665 0.174533 2.0944)
              y=(0.025599 0.0259487 0.0273124 0.0274796 0.0275151 0.0271363 0.0265737 0.0263073 0.0261187 0.0260129 0.0252923 0.0252911 0.0252898 0.0250526 0.0242191 0.0218288 -0.0685706)
        z_location: MultiplierFunction: scale=0.988523
          SimmSpline: x=(-2.0944 2.0944) y=(-0.0018 -0.0018)
    Millard2012EquilibriumMuscle vas_lat_l: max_isometric_force=1871 optimal_fiber_length=0.09705652
        tendon_slack_length=0.1814032 pennation_angle_at_optimal=0.08726646
      PathPoint P1: femur_l (0.005506752 -0.2126983 -0.04003868)
      PathPoint P2: femur_l (0.03086076 -0.2972499 -0.04692212)
      ConditionalPathPoint P3: femur_l (0.04141536 -0.4623377 -0.02351842)
          socket_coordinate=/jointset/knee_l/knee_angle_l range=(-2.61799 -1.21004)
      ConditionalPathPoint P4: femur_l (0.02902517 -0.4867739 -0.02110922)
          socket_coordinate=/jointset/knee_l/knee_angle_l range=(-2.61799 -1.92004)
      MovingPathPoint P5: tibia_l socket_x_coordinate=/jointset/knee_l/knee_angle_l
          socket_y_coordinate=/jointset/knee_l/knee_angle_l socket_z_coordinate=/jointset/knee_l/knee_angle_l
        x_location: MultiplierFunction: scale=0.988523
          SimmSpline: x=(-2.0944 -1.99997 -1.5708 -1.45752 -1.39626 -1.0472 -0.698132 -0.526391 -0.349066 -0.174533 0 0.00017453 0.00034907 0.0279253 0.0872665 0.174533 2.0944)
              y=(0.0142897 0.016703 0.0262145 0.0283623 0.0294674 0.0352709 0.0408785 0.0437291 0.0469704 0.0518742 0.0599557 0.0599647 0.0599738 0.0614577 0.0650351 0.0711867 0.0583766)
        y_location: MultiplierFunction: scale=0.988523
          SimmSpline: x=(-2.0944 -1.99997 -1.5708 -1.45752 -1.39626 -1.0472 -0.698132 -0.526391 -0.349066 -0.174533 0 0.00017453 0.00034907 0.0279253 0.0872665 0.174533 2.0944)
              y=(0.0215318 0.0218815 0.0232362 0.0234019 0.0234371 0.0230439 0.0223842 0.0220151 0.0216359 0.0210971 0.0195864 0.0195842 0.019582 0.01919 0.018008 0.0151073 -0.0653421)
        z_location: MultiplierFunction: scale=0.988523
          SimmSpline: x=(-2.0944 2.0944) y=(-0.0165 -0.0165)
    Millard2012EquilibriumMuscle med_gas_l: max_isometric_force=1558 optimal_fiber_length=0.0600858
        tendon_slack_length=0.3905577 pennation_angle_at_optimal=0.296706
      PathPoint P1: femur_l (-0.02179756 -0.4507506 0.02696014)
      ConditionalPathPoint P2: femur_l (-0.0344172 -0.4614199 0.02959879)
          socket_coordinate=/jointset/knee_l/knee_angle_l range=(-0.785398 0.174533)
      PathPoint P3: calcn_l (0 0.03183963 0.005443549)
    Millard2012EquilibriumMuscle lat_gas_l: max_isometric_force=683 optimal_fiber_length=0.06400235
        tendon_slack_length=0.380014 pennation_angle_at_optimal=0.1396263
      PathPoint P1: femur_l (-0.02523928 -0.4527009 -0.03120493)
      ConditionalPathPoint P2: femur_l (-0.0344172 -0.460961 -0.03143438)
          socket_coordinate=/jointset/knee_l/knee_angle_l range=(-0.785398 0.174533)
      PathPoint P3: calcn_l (0 0.03183963 0.005443549)
    Millard2012EquilibriumMuscle soleus_l: max_isometric_force=3549 optimal_fiber_length=0.0502888
        tendon_slack_length=0.251444 pennation_angle_at_optimal=0.4363323
      PathPoint P1: tibia_l (-0.002372455 -0.1515406 -0.007018513)
      PathPoint P2: calcn_l (0 0.03183963 0.005443549)
    Millard2012EquilibriumMuscle tib_post_l: max_isometric_force=1588 optimal_fiber_length=0.03107549
        tendon_slack_length=0.3107549 pennation_angle_at_optimal=0.2094395
      PathPoint P1: tibia_l (-0.009292116 -0.1332529 -0.001878194)
      PathPoint P2: tibia_l (-0.01423473 -0.4004507 0.02263718)
      PathPoint P3: calcn_l (0.04282943 0.03430463 0.02937462)
      PathPoint P4: calcn_l (0.07929094 0.01633065 0.02886108)
    Millard2012EquilibriumMuscle flex_dig_l: max_isometric_force=310 optimal_fiber_length=0.0344375
        tendon_slack_length=0.4051471 pennation_angle_at_optimal=0.1221731
      PathPoint P1: tibia_l (-0.008204741 -0.2022518 0.001779341)
      PathPoint P2: tibia_l (-0.01522325 -0.4004507 0.01937505)
      PathPoint P3: calcn_l (0.0447809 0.03235317 0.02875837)
      PathPoint P4: calcn_l (0.0727176 0.01807669 0.02701233)
      PathPoint P5: calcn_l (0.1702907 -0.008319387 -0.01191418)
      PathPoint P6: toes_l (-0.001951461 -0.008011261 -0.01509815)
      PathPoint P7: toes_l (0.02927192 -0.007292302 -0.02208232)
      PathPoint P8: toes_l (0.04529444 -0.006162509 -0.02485545)
    Millard2012EquilibriumMuscle flex_hal_l: max_isometric_force=322 optimal_fiber_length=0.04367407
        tendon_slack_length=0.3859569 pennation_angle_at_optimal=0.1745329
      PathPoint P1: tibia_l (-0.007809332 -0.2307213 -0.02411996)
      PathPoint P2: tibia_l (-0.01838653 -0.4032185 0.0172003)
      PathPoint P3: calcn_l (0.03841297 0.02834754 0.02475274)
      PathPoint P4: calcn_l (0.1066114 0.006984176 0.02629337)
      PathPoint P5: calcn_l (0.1772748 -0.005443549 0.02762858)
      PathPoint P6: toes_l (0.01591981 -0.006573343 0.02721775)
      PathPoint P7: toes_l (0.05772216 -0.01047626 0.01859023)
    Millard2012EquilibriumMuscle tib_ant_l: max_isometric_force=905 optimal_fiber_length=0.09791263
        tendon_slack_length=0.2228012 pennation_angle_at_optimal=0.08726646
      PathPoint P1: tibia_l (0.01769456 -0.1605361 -0.01136801)
      PathPoint P2: tibia_l (0.03252241 -0.3905654 0.01749686)
      PathPoint P3: calcn_l (0.1197581 0.01828211 0.03132609)
    Millard2012EquilibriumMuscle per_brev_l: max_isometric_force=435 optimal_fiber_length=0.05004055
        tendon_slack_length=0.1611306 pennation_angle_at_optimal=0.08726646
      PathPoint P1: tibia_l (-0.006919661 -0.2615632 -0.032127)
      PathPoint P2: tibia_l (-0.01957276 -0.413598 -0.0279752)
      PathPoint P3: tibia_l (-0.01423473 -0.4245706 -0.02856831)
      PathPoint P4: calcn_l (0.04837569 0.02773129 -0.02393108)
      PathPoint P5: calcn_l (0.06953364 0.02249316 -0.03522901)
    Millard2012EquilibriumMuscle per_long_l: max_isometric_force=943 optimal_fiber_length=0.04918451
        tendon_slack_length=0.3462991 pennation_angle_at_optimal=0.1745329
      PathPoint P1: tibia_l (0.0004942615 -0.1550004 -0.03578453)
      PathPoint P2: tibia_l (-0.02046243 -0.4156739 -0.02827176)
      PathPoint P3: tibia_l (-0.01601407 -0.4269431 -0.02856831)
      PathPoint P4: calcn_l (0.04498631 0.02362295 -0.02269857)
      PathPoint P5: calcn_l (0.06994447 0.0108871 -0.02916921)
      PathPoint P6: calcn_l (0.08750762 0.007086885 -0.0121196)
      PathPoint P7: calcn_l (0.1235583 0.008730221 0.01889836)
    Millard2012EquilibriumMuscle per_tert_l: max_isometric_force=180 optimal_fiber_length=0.07988519
        tendon_slack_length=0.1011205 pennation_angle_at_optimal=0.2268928
      PathPoint P1: tibia_l (0.000988523 -0.2771818 -0.02283488)
      PathPoint P2: tibia_l (0.02263718 -0.40223 -0.01571752)
      PathPoint P3: calcn_l (0.08802116 0.02341753 -0.03070983)
    Millard2012EquilibriumMuscle ext_dig_l: max_isometric_force=512 optimal_fiber_length=0.102694
        tendon_slack_length=0.3473473 pennation_angle_at_optimal=0.1396263
      PathPoint P1: tibia_l (0.003163274 -0.136515 -0.02728323)
      PathPoint P2: tibia_l (0.02856831 -0.3961012 -0.007117366)
      PathPoint P3: calcn_l (0.09469722 0.03985089 0.0001027085)
      PathPoint P4: calcn_l (0.1659769 0.005648966 -0.0133521)
      PathPoint P5: toes_l (0.0003081254 0.004827298 -0.0157144)
      PathPoint P6: toes_l (0.04549986 -0.0004108339 -0.02567712)
    Millard2012EquilibriumMuscle ext_hal_l: max_isometric_force=162 optimal_fiber_length=0.1119446
        tendon_slack_length=0.3075954 pennation_angle_at_optimal=0.1047198
      PathPoint P1: tibia_l (0.001186228 -0.174672 -0.02253832)
      PathPoint P2: tibia_l (0.03222585 -0.3939264 0.008402446)
      PathPoint P3: calcn_l (0.09962722 0.0399536 0.02167149)
      PathPoint P4: calcn_l (0.1328021 0.03173692 0.02639608)
      PathPoint P5: calcn_l (0.1780965 0.01427648 0.02875837)
      PathPoint P6: toes_l (0.03060713 0.004211048 0.02516358)
      PathPoint P7: toes_l (0.05782487 0.003492088 0.01910378)
    Millard2012EquilibriumMuscle ercspn_r: max_isometric_force=2500 optimal_fiber_length=0.1278847
        tendon_slack_length=0.03197118 pennation_angle_at_optimal=0
      PathPoint P1: pelvis (-0.1434408 0.04497893 0.04467156)
      PathPoint P2: torso (-0.05938459 0.1187692 0.02602125)
    Millard2012EquilibriumMuscle ercspn_l: max_isometric_force=2500 optimal_fiber_length=0.1278847
        tendon_slack_length=0.03197118 pennation_angle_at_optimal=0
      PathPoint P1: pelvis (-0.1434408 0.04497893 -0.04467156)
      PathPoint P2: torso (-0.05938459 0.1187692 -0.02602125)
    Millard2012EquilibriumMuscle intobl_r: max_isometric_force=900 optimal_fiber_length=0.106202
        tendon_slack_length=0.106202 pennation_angle_at_optimal=0
      PathPoint P1: pelvis (-0.04098308 0.07172039 0.1185436)
      PathPoint P2: torso (0.07558039 0.1727552 0.0161958)
    Millard2012EquilibriumMuscle intobl_l: max_isometric_force=900 optimal_fiber_length=0.106202
        tendon_slack_length=0.106202 pennation_angle_at_optimal=0
      PathPoint P1: pelvis (-0.04098308 0.07172039 -0.1185436)
      PathPoint P2: torso (0.07558039 0.1727552 -0.0161958)
    Millard2012EquilibriumMuscle extobl_r: max_isometric_force=900 optimal_fiber_length=0.1263775
        tendon_slack_length=0.1474404 pennation_angle_at_optimal=0
      PathPoint P1: pelvis (-0.03073731 -0.0651631 0.01024577)
      PathPoint P2: torso (0.07018179 0.1187692 0.1187692)
    Millard2012EquilibriumMuscle extobl_l: max_isometric_force=900 optimal_fiber_length=0.1263775
        tendon_slack_length=0.1474404 pennation_angle_at_optimal=0
      PathPoint P1: pelvis (-0.03073731 -0.0651631 -0.01024577)
      PathPoint P2: torso (0.07018179 0.1187692 -0.1187692)
    TorqueActuator pelvis_MX: bodyA=pelvis bodyB=ground torque_is_global=true axis=(1 0 0) optimal_force=10
    TorqueActuator pelvis_MY: bodyA=pelvis bodyB=ground torque_is_global=true axis=(0 1 0) optimal_force=10
    TorqueActuator pelvis_MZ: bodyA=pelvis bodyB=ground torque_is_global=true axis=(0 0 1) optimal_force=10
    PointActuator pelvis_FX: body=pelvis point=(-0.034 0 0) point_is_global=false direction=(1 0 0)
        force_is_global=true optimal_force=10
    PointActuator pelvis_FY: body=pelvis point=(-0.034 0 0) point_is_global=false direction=(0 1 0)
        force_is_global=true optimal_force=10
    PointActuator pelvis_FZ: body=pelvis point=(-0.034 0 0) point_is_global=false direction=(0 0 1)
        force_is_global=true optimal_force=10
    ObjectGroup R_hip_abd: members=(glut_max1_r glut_med1_r glut_med2_r glut_med3_r glut_min1_r glut_min2_r glut_min3_r peri_r sar_r tfl_r)
    ObjectGroup R_hip_flex: members=(add_brev_r add_long_r glut_med1_r glut_min1_r grac_r iliacus_r pect_r psoas_r rect_fem_r sar_r tfl_r)
    ObjectGroup R_hip_inrot: members=(glut_med1_r glut_min1_r iliacus_r psoas_r tfl_r)
    ObjectGroup R_hip_exrot: members=(gem_r glut_med3_r glut_min3_r peri_r quad_fem_r)
    ObjectGroup R_hip_ext: members=(add_long_r add_mag1_r add_mag2_r add_mag3_r bifemlh_r glut_max1_r glut_max2_r glut_max3_r glut_med3_r glut_min3_r semimem_r semiten_r)
    ObjectGroup R_hip_add: members=(add_brev_r add_long_r add_mag1_r add_mag2_r add_mag3_r bifemlh_r grac_r pect_r semimem_r semiten_r)
    ObjectGroup R_knee_bend: members=(bifemlh_r bifemsh_r grac_r lat_gas_r med_gas_r sar_r semimem_r semiten_r)
    ObjectGroup R_knee_ext: members=(rect_fem_r vas_int_r vas_lat_r vas_med_r)
    ObjectGroup R_ankle_pf: members=(flex_dig_r flex_hal_r lat_gas_r med_gas_r per_brev_r per_long_r soleus_r tib_post_r)
    ObjectGroup R_inverter: members=(ext_hal_r flex_dig_r flex_hal_r tib_ant_r tib_post_r)
    ObjectGroup R_ankle_df: members=(ext_dig_r ext_hal_r per_tert_r tib_ant_r)
    ObjectGroup R_everter: members=(ext_dig_r per_brev_r per_long_r per_tert_r)
    ObjectGroup L_hip_abd: members=(glut_max1_l glut_med1_l glut_med2_l glut_med3_l glut_min1_l glut_min2_l glut_min3_l peri_l sar_l tfl_l)
    ObjectGroup L_hip_flex: members=(add_brev_l add_long_l glut_med1_l glut_min1_l grac_l iliacus_l pect_l psoas_l rect_fem_l sar_l tfl_l)
    ObjectGroup L_hip_inrot: members=(glut_med1_l glut_min1_l iliacus_l psoas_l tfl_l)
    ObjectGroup L_hip_exrot: members=(gem_l glut_med3_l glut_min3_l peri_l quad_fem_l)
    ObjectGroup L_hip_ext: members=(add_long_l add_mag1_l add_mag2_l add_mag3_l bifemlh_l glut_max1_l glut_max2_l glut_max3_l glut_med3_l glut_min3_l semimem_l semiten_l)
    ObjectGroup L_hip_add: members=(add_brev_l add_long_l add_mag1_l add_mag2_l add_mag3_l bifemlh_l grac_l pect_l semimem_l semiten_l)
    ObjectGroup L_knee_bend: members=(bifemlh_l bifemsh_l grac_l lat_gas_l med_gas_l sar_l semimem_l semiten_l)
    ObjectGroup L_knee_ext: members=(rect_fem_l vas_int_l vas_lat_l vas_med_l)
    ObjectGroup L_ankle_pf: members=(flex_dig_l flex_hal_l lat_gas_l med_gas_l per_brev_l per_long_l soleus_l tib_post_l)
    ObjectGroup L_inverter: members=(ext_hal_l flex_dig_l flex_hal_l tib_ant_l tib_post_l)
    ObjectGroup L_ankle_df: members=(ext_dig_l ext_hal_l per_tert_l tib_ant_l)
    ObjectGroup L_everter: members=(ext_dig_l per_brev_l per_long_l per_tert_l)
    ObjectGroup back_ext: members=(ercspn_l ercspn_r)
    ObjectGroup back_rlb: members=(ercspn_r extobl_r intobl_r)
    ObjectGroup back_introt: members=(ercspn_r extobl_l intobl_r)
    ObjectGroup back_llb: members=(ercspn_l extobl_l intobl_l)
    ObjectGroup back_extrot: members=(ercspn_l extobl_r intobl_l)
    ObjectGroup back_flex: members=(extobl_l extobl_r intobl_l intobl_r)
  MarkerSet:
    Marker Sternum: torso (0.1186014 0.3076059 0.001466184)
    Marker R.Acromium: torso (-0.004397361 0.4267791 0.1712345)
    Marker L.Acromium: torso (-0.00246694 0.4421746 -0.1696253)
    Marker Top.Head: torso (0.0920279 0.6956973 0.01308684)
    Marker R.ASIS: pelvis (0.02375771 0.03659122 0.1306895)
    Marker L.ASIS: pelvis (0.02828685 0.02800082 -0.1314223)
    Marker V.Sacral: pelvis (-0.1724387 0.03961915 0.007218728)
    Marker R.Thigh.Upper: femur_r (0.0466916 -0.2200964 0.09182193)
    Marker R.Thigh.Front: femur_r (0.1086937 -0.2818118 -0.000735998)
    Marker R.Thigh.Rear: femur_r (0.03567673 -0.3407172 0.08187659)
    Marker R.Knee.Lat: femur_r (-0.003388751 -0.4260659 0.06139711)
    Marker R.Knee.Med: femur_r (0.000367027 -0.4429712 -0.05969016)
    Marker R.Shank.Upper: tibia_r (-0.02754064 -0.05983729 0.07020198)
    Marker R.Shank.Front: tibia_r (0.05084537 -0.09528844 0.01974791)
    Marker R.Shank.Rear: tibia_r (-0.01148904 -0.1452846 0.08030879)
    Marker R.Ankle.Lat: tibia_r (-0.007480087 -0.4305887 0.05553098)
    Marker R.Ankle.Med: tibia_r (0.004629707 -0.4161611 -0.03331491)
    Marker R.Heel: calcn_r (-0.02029137 0.0172123 -0.005516109)
    Marker R.Midfoot.Sup: calcn_r (0.1227165 0.03341638 -0.04041248)
    Marker R.Midfoot.Lat: calcn_r (0.1182575 0.00647453 0.06539983)
    Marker R.Toe.Lat: calcn_r (0.2089005 -0.0164816 0.07281346)
    Marker R.Toe.Med: calcn_r (0.2097712 0.003329896 -0.03456345)
    Marker R.Toe.Tip: calcn_r (0.2709441 0.003309933 -0.003193728)
    Marker L.Thigh.Upper: femur_l (0.0228561 -0.2067359 -0.09731341)
    Marker L.Thigh.Front: femur_l (0.1108832 -0.2489549 -0.03404146)
    Marker L.Thigh.Rear: femur_l (0.01534203 -0.3154222 -0.08246186)
    Marker L.Knee.Lat: femur_l (-0.008637732 -0.44571 -0.06425601)
    Marker L.Knee.Med: femur_l (0.008707769 -0.4459098 0.05073879)
    Marker L.Shank.Upper: tibia_l (-0.006332534 -0.07147663 -0.07949859)
    Marker L.Shank.Front: tibia_l (0.04516834 -0.1215346 -0.03087385)
    Marker L.Shank.Rear: tibia_l (-0.02460287 -0.1144682 -0.08803693)
    Marker L.Ankle.Lat: tibia_l (-0.0036863 -0.4283631 -0.05720044)
    Marker L.Ankle.Med: tibia_l (0.01296892 -0.4053602 0.03274372)
    Marker L.Heel: calcn_l (-0.02249995 0.02645148 0.006176396)
    Marker L.Midfoot.Sup: calcn_l (0.1493419 0.03649393 0.03472317)
    Marker L.Midfoot.Lat: calcn_l (0.1335193 0.0177909 -0.06207879)
    Marker L.Toe.Lat: calcn_l (0.1964419 -0.00660644 -0.06716124)
    Marker L.Toe.Med: calcn_l (0.2115482 0.01316096 0.03323553)
    Marker L.Toe.Tip: calcn_l (0.2614245 0.01004744 0.009347541)
